OpenVSP model (file version 5), 25 components.
Geometry view with OpenVSP parameter names; values to 6 digits, angles in degrees, lengths in the model's unit.
Overall bounding box: X_Min=-32 X_Len=82.162 Y_Min=-57.9029 Y_Len=115.806 Z_Min=-9.56264 Z_Len=21.6893

Wing "Horizontal Stabilizer"
  location (X Y Z) 43 0 9.5, rotation 0 0 0
  symmetric about XZ
  bounding box size 6.67949 20.7748 0.50029
  totals: TotalSpan=20 TotalProjectedSpan=20 TotalChord=4.5 TotalArea=90 TotalAR=4.44444
  root: chord 5, twist 0, NACA 4-series Camber=0 CamberLoc=0.2 ThickChord=0.1
  sections:
    n  Span  Root_Chord  Tip_Chord  Area  Sweep  Sweep_Location  Dihedral  Twist  Twist_Location  tip airfoil
    1  10    5           4          45    15     0               0         0      0.25            as above
  SS_Control "SS_CONT_0": UStart=0 UEnd=1 Length_C_Start=0.25 Length_C_End=0.25 Length_Start=1.25 Length_End=1 LE_Flag=0 Surf_Type=2

Wing "Vertical Stabilizer"
  location (X Y Z) 30 0 -1, rotation 90 0 0
  bounding box size 20.162 1.60093 13.1266
  totals: TotalSpan=12.75 TotalProjectedSpan=12.75 TotalChord=11.125 TotalArea=144.188 TotalAR=1.12744
  root: chord 16, twist 0, NACA 4-series Camber=0 CamberLoc=0.2 ThickChord=0.1
  sections:
    n  Span  Root_Chord  Tip_Chord  Area     Sweep  Sweep_Location  Dihedral  Twist  Twist_Location  tip airfoil
    1  7     16          10         91       50     0               0         0      0.25            as above
    2  5.75  10          8.5        53.1875  30     0               0         0      0.25            as above
  SS_Control "SS_CONT_0": UStart=0.262195 UEnd=0.6 Length_C_Start=0.3 Length_C_End=0.3 Length_Start=4.7122 Length_End=2.82 LE_Flag=0 Surf_Type=2

Wing "Main Wing"
  location (X Y Z) 6.32911e-05 0 0.000177215, rotation 0 0 0
  symmetric about XZ
  bounding box size 10.3011 115.806 2.50315
  totals: TotalSpan=118.11 TotalProjectedSpan=115.779 TotalChord=5.41837 TotalArea=826.135 TotalAR=16.2258
  root: chord 10.188, twist 2, airfoil file "NACA 64-210"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 BaseThickChord=0.100034 ThickChord=0.16
  sections:
    n  Span      Root_Chord  Tip_Chord  Area      Sweep  Sweep_Location  Dihedral  Twist  Twist_Location  tip airfoil
    1  11.4223   10.188      9.30258    111.314   5      0               0         0      0.25            airfoil file "NACA 64-210"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 BaseThickChord=0.100034 ThickChord=0.13
    2  45.6891   9.30258     3.72103    297.519   5      0               0         -2     0.25            airfoil file "NACA 64-210"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 BaseThickChord=0.100034 ThickChord=0.12
    3  0.215971  3.72103     3.05641    0.731865  75     0               30        0      0.25            airfoil file "NACA 64-210"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 BaseThickChord=0.100034 ThickChord=0.11
    4  1.72777   3.05641     0.9989     3.50332   50     0               70        0      0.25            airfoil file "NACA 64-210"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 BaseThickChord=0.100034 ThickChord=0.1
  SS_Control "Outboard Aileron": UStart=0.35 UEnd=0.398 Length_C_Start=0.25 Length_C_End=0.25 Length_Start=1.27891 Length_End=0.944198 LE_Flag=0 Surf_Type=2
  SS_Control "Inboard Flap": UStart=0.0792683 UEnd=0.176829 Length_C_Start=0.25 Length_C_End=0.25 Length_Start=2.45892 Length_End=2.35113 LE_Flag=0 Surf_Type=2
  SS_Control "Inboard Slat": UStart=0.0792683 UEnd=0.176829 Length_C_Start=0.1 Length_C_End=0.1 Length_Start=0.983568 Length_End=0.940453 LE_Flag=1 Surf_Type=2
  SS_Control "Outboard Slat": UStart=0.207317 UEnd=0.396341 Length_C_Start=0.1 Length_C_End=0.1 Length_Start=0.90983 Length_End=0.382303 LE_Flag=1 Surf_Type=2
  SS_Control "Outboard Flap": UStart=0.207317 UEnd=0.262195 Length_C_Start=0.25 Length_C_End=0.25 Length_Start=2.27457 Length_End=1.89156 LE_Flag=0 Surf_Type=2
  SS_Control "Inboard Aileron": UStart=0.262195 UEnd=0.27439 Length_C_Start=0.4 Length_C_End=0.4 Length_Start=3.0265 Length_End=2.89033 LE_Flag=0 Surf_Type=2

Stack "Fairing", child of "Main Wing"
  location (X Y Z) -6 0 -4.18357, rotation 0 0 0
  bounding box size 24 8.79524 3.79595
  cross sections:
    n  XDelta  YDelta  ZDelta  shape
    0  0       0       0       edit curve Width=9 Height=8.75 AbsoluteFlag=0 SymType=1 cubic Bezier points (X Y): 0.258838 0.363904, 0.228206 0.395411, 0.240459 0.401712, 0.179195 0.448973, 0.120995 0.474178, 0.0444159 0.458425, 0 0.464726, -0.0444159 0.458425, -0.120995 0.474178, -0.179195 0.448973, -0.240459 0.401712, -0.228206 0.395411, -0.258838 0.363904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
    1  6       0       2.5     edit curve Width=6.70833 Height=5.32835 AbsoluteFlag=0 SymType=1 cubic Bezier points (X Y): 0.51976 0.110969, 0.507922 0.0476213, 0.54069 -0.0212065, 0.557409 -0.0914682, 0.574128 -0.16173, 0.519863 -0.121587, 0.511644 -0.0853697, 0.355479 0.121587, 0.728988 0.464792, 0 0.44237, -0.728988 0.464792, -0.355479 0.121587, -0.511644 -0.0853697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
    2  6       0       0.3     as above
    3  6       0       -0.3    as above
    4  6       0       -2.5    edit curve Width=9 Height=8.75 AbsoluteFlag=0 SymType=1 cubic Bezier points (X Y): 0.255774 0.357603, 0.225143 0.385959, 0.188385 0.420616, 0.130185 0.448973, 0.0719844 0.474178, 0.0444159 0.458425, 0 0.464726, -0.0444159 0.458425, -0.0719844 0.474178, -0.130185 0.448973, -0.188385 0.420616, -0.225143 0.385959, -0.255774 0.357603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

Wing "Truss Brace", child of "Main Wing"
  location (X Y Z) 11.3588 0 -8.28446, rotation 0 0 0; relative location 11.3588 0 -8.28463, rotation 0 0 0
  symmetric about XZ
  bounding box size 9.761 65.592 8.83183
  totals: TotalSpan=67.7526 TotalProjectedSpan=65.592 TotalChord=3.25 TotalArea=220.196 TotalAR=19.5386
  root: chord 5, twist 0, NACA 4-series Camber=0 CamberLoc=0.2 ThickChord=0.1
  sections:
    n  Span     Root_Chord  Tip_Chord  Area     Sweep  Sweep_Location  Dihedral  Twist  Twist_Location  tip airfoil
    1  16.9381  5           3          67.7526  -8     0               14        0      0.25            as above
    2  16.9381  3           2          42.3454  -8     0               15        0      0.25            as above

Fuselage "Turboprop"
  location (X Y Z) -3.04348 11.422 -1.17391, rotation 0 0 0
  symmetric about XZ
  bounding box size 20.5455 25.6689 4.89576
  Design: Length=20.5455
  cross sections:
    n  XLocPercent  YLocPercent  ZLocPercent  shape
    0  0            0            0            circle Circle_Diameter=2
    1  0.25         0            -0.0340708   general fuselage BotStr=0.83 BotTanAngle=90 CornerRad=0 Height=4.77838 LowStr=0.83 MaxWidthLoc=0 TopStr=1.83 TopTanAngle=90 UpStr=0.83 Width=2.5
    2  0.75         0            -0.0340708   as above
    3  1            0            0.0375709    point

Fuselage "Propeller Cone", child of "Turboprop"
  location (X Y Z) -5.75009 11.422 -1.17391, rotation 0 0 0; relative location -2.70661 0 0, rotation 0 0 0
  symmetric about XZ
  bounding box size 5.09091 24.844 2
  Design: Length=5.09091
  cross sections:
    n  XLocPercent  YLocPercent  ZLocPercent  shape
    0  0            0            0            point
    1  0.5          0            0            circle Circle_Diameter=1.9
    2  1            0            0            ellipse Ellipse_Height=2 Ellipse_Width=2

Propeller "Propeller", child of "Propeller Cone"
  location (X Y Z) -4.31065 11.422 -1.17391, rotation 0 0 0; relative location 1.43944 0 0, rotation 0 0 0
  symmetric about XZ
  bounding box size 1.25901 34.711 11.627
  Design: Diameter=12 NumBlade=6 Beta34=20 UseBeta34Flag=1 Feather=0 Rotate=0 Precone=0 ReverseFlag=0 FoldAngle=0 PropMode=0 AF=161.554 CLi=0.539845 Chord=0.251407 Solidity=0.480153 ConstructXoC=0.5 FeatherAxisXoC=0 FeatherOffsetXoC=-0.25
  cross sections:
    n  RadiusFrac  shape
    0  0.12        ellipse Ellipse_Height=0.565278 Ellipse_Width=1.13056
    1  0.4         NACA 16-series Chord=1.83413 IdealCl=0.7 ThickChord=0.144074
    2  1           NACA 16-series Chord=0.672222 IdealCl=0.2 ThickChord=0.03
  Chord along r/R (cubic Bezier): 0.12: 0.188426, 0.296343: 0.351389, 0.472687: 0.305556, 0.64903: 0.280093, 0.76602: 0.244444, 0.88301: 0.188426, 1: 0.112037
  Twist along r/R (PCHIP): 0.12: 60, 0.75: 20, 1: 13
  Sweep along r/R (cubic Bezier): 0.12: 0, 0.413333: 0, 0.706667: -2.16944, 1: 12.2222
  Thick along r/R (cubic Bezier): 0.12: 0.5, 0.18: 0.3, 0.24: 0.225, 0.3: 0.2, 0.4: 0.125, 0.5: 0.115, 0.6: 0.1, 0.733333: 0.075, 0.866667: 0.055, 1: 0.03
  CLI along r/R (cubic Bezier): 0.12: 0, 0.213333: 0.7, 0.306667: 0.7, 0.4: 0.7, 0.466667: 0.7, 0.533333: 0.7, 0.6: 0.7, 0.733333: 0.7, 0.866667: 0.7, 1: 0.2

Fuselage "Inlet", child of "Turboprop"
  location (X Y Z) -2.71739 11.422 -3.47391, rotation 0 0 0; relative location 0.326087 0 -2.3, rotation 0 0 0
  symmetric about XZ
  bounding box size 10.103 25.96 1.61603
  Design: Length=10
  cross sections:
    n  XLocPercent  YLocPercent  ZLocPercent  shape
    0  1            0            0.027027     ellipse Ellipse_Height=1 Ellipse_Width=1
    1  0.99         0            0.027027     ellipse Ellipse_Height=0.8 Ellipse_Width=0.8
    2  0.5          0            0            super ellipse Super_Height=1.5 Super_M=2 Super_MaxWidthLoc=0 Super_N=2 Super_Width=2
    3  0.01622      0            0            super ellipse Super_Height=1 Super_M=4 Super_MaxWidthLoc=0 Super_N=2 Super_Width=2.3
    4  0            0            0            super ellipse Super_Height=1.2 Super_M=4 Super_MaxWidthLoc=0 Super_N=2 Super_Width=2.7
    5  0.2          0            0            super ellipse Super_Height=1.6 Super_M=5 Super_MaxWidthLoc=0 Super_N=2 Super_Width=2.8
    6  0.5          0            0            rounded rectangle RoundRectXSec_Radius=0.2 RoundedRect_Height=1.5 RoundedRect_Width=2.5
    7  0.99         0            0.025        super ellipse Super_Height=1.1 Super_M=2 Super_MaxWidthLoc=0 Super_N=3 Super_Width=1.1
    8  1            0            0.027027     ellipse Ellipse_Height=1 Ellipse_Width=1

Custom "Inlet", child of "Inlet"
  location (X Y Z) -2.2412 11.422 -3.47391, rotation 0 0 0; relative location 0.47619 0 0, rotation 0 0 0
  symmetric about XZ
  bounding box size 0.001 25.1689 1.1
  Design: Height=1.1 Length=0.001 SquareFlag=0 Width=2.32493
  custom script Box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

Custom "Inlet", child of "Inlet"
  location (X Y Z) -2.41739 11.422 -3.47391, rotation 0 0 0; relative location 0.3 0 0, rotation 0 0 0
  symmetric about XZ
  bounding box size 0.001 25.1689 1.1
  Design: Height=1.1 Length=0.001 SquareFlag=0 Width=2.32493
  custom script Box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

Fuselage "Fuselage"
  location (X Y Z) -32 0 -4.2, rotation 0 0 0
  bounding box size 79 9.71974 8.85517
  Design: Length=79
  cross sections:
    n  XLocPercent  YLocPercent  ZLocPercent  shape
    0  0            0            -0.02        edit curve Width=0 Height=0 AbsoluteFlag=0 SymType=0 cubic Bezier points (X Y): 0 0, 0 0, 0 0, 0 0, 0 0, 0 0, 0 0
    1  0.152174     0            0            ellipse Ellipse_Height=8.75 Ellipse_Width=9
    2  0.5          0            0            as above
    3  0.696        0            0            as above
    4  0.995        0            0.0251464    ellipse Ellipse_Height=2.5 Ellipse_Width=2.6
    5  1            0            0.025        ellipse Ellipse_Height=0.75 Ellipse_Width=0.75

Conformal "Inner Fuselage", child of "Fuselage"
  location (X Y Z) -32 0 -4.2, rotation 0 0 0; relative location 0 0 0, rotation 0 0 0
  bounding box size 78.7518 9.21974 8.35505
  Design: ChordTrimFlag=0 ChordTrimMax=0.9 ChordTrimMin=0.1 Offset=0.25 UTrimFlag=0 UTrimMax=0.9 UTrimMin=0.1 V1TrimBegin=0.3 V1TrimEnd=1 V1TrimFlag=0 V2TrimBegin=0.25 V2TrimEnd=0.75 V2TrimFlag=0

Conformal "Floor", child of "Fuselage"
  location (X Y Z) -32 0 -4.2, rotation 0 0 0; relative location 0 0 0, rotation 0 0 0
  bounding box size 65.3087 8.73481 2.14584
  Design: ChordTrimFlag=0 ChordTrimMax=0.9 ChordTrimMin=0.1 Offset=0.1 UTrimFlag=1 UTrimMax=0.7 UTrimMin=0.08 V1TrimBegin=0.44 V1TrimEnd=0.06 V1TrimFlag=1 V2TrimBegin=0.07 V2TrimEnd=0.43 V2TrimFlag=1

Conformal "Forward Bulkhead", child of "Fuselage"
  location (X Y Z) -32 0 -4.2, rotation 0 0 0; relative location 0 0 0, rotation 0 0 0
  bounding box size 0.324373 8.80117 6.12168
  Design: ChordTrimFlag=0 ChordTrimMax=0.9 ChordTrimMin=0.1 Offset=0.1 UTrimFlag=1 UTrimMax=0.2 UTrimMin=0.195 V1TrimBegin=0.3 V1TrimEnd=1 V1TrimFlag=0 V2TrimBegin=0.07 V2TrimEnd=0.43 V2TrimFlag=1

Conformal "Forward Pressure Bulkhead", child of "Fuselage"
  location (X Y Z) -32 0 -4.2, rotation 0 0 0; relative location 0 0 0, rotation 0 0 0
  bounding box size 0.395564 5.28207 3.58176
  Design: ChordTrimFlag=0 ChordTrimMax=0.9 ChordTrimMin=0.1 Offset=0.1 UTrimFlag=1 UTrimMax=0.08 UTrimMin=0.075 V1TrimBegin=0.3 V1TrimEnd=0.4 V1TrimFlag=1 V2TrimBegin=0.07 V2TrimEnd=0.43 V2TrimFlag=1

Custom "Cockpit Seats", child of "Fuselage"
  location (X Y Z) -23 1.75 -3.83333, rotation 180 0 0
  bounding box size 2.28588 4.917 3.50438
  Design: BackAngle=-7 BackHeight=3.5 BackThick=0.25 SeatHeight=0.25 SeatLength=1.5 Width=1.5
  Layout: AisleWidth=1.75 NumLeft=1 NumMiddle=0 NumRight=1 NumRow=1 SeatGap=0.167 SeatPitch=2.75
  custom script SeatGroup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

Stack "Instrument Panel", child of "Fuselage"
  location (X Y Z) -25.6739 0 -3.33333, rotation 0 0 0
  bounding box size 0.875 6.6465 1.4
  cross sections:
    n  XDelta  YDelta  ZDelta  shape
    0  0       0       0       point
    1  0       0       0       general fuselage BotStr=0 BotTanAngle=0 CornerRad=0 Height=1.4 LowStr=0 MaxWidthLoc=-1 TopStr=1.83 TopTanAngle=0 UpStr=0 Width=6.3
    2  0.875   0       0       as above
    3  0       0       0       as above
    4  0       0       0       as above

Custom "Co-Pilot", child of "Fuselage"
  location (X Y Z) -22.25 1.75 -0.958333, rotation 0 90 0
  bounding box size 3.16673 2.12571 4.88571
  Design: ElbowAngle=15 Height=6 HipAngle=90 KneeAngle=-90 PresetTrigger=0 Presets=1 ShoulderAngle=60
  custom script PodMan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

Custom "Pilot", child of "Fuselage"
  location (X Y Z) -22.25 -1.75 -0.958333, rotation 0 90 0
  bounding box size 3.16673 2.12571 4.88571
  Design: ElbowAngle=15 Height=6 HipAngle=90 KneeAngle=-90 PresetTrigger=0 Presets=1 ShoulderAngle=60
  custom script PodMan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

Conformal "Forward Cargo Hold", child of "Fuselage"
  location (X Y Z) -32 0 -4.2, rotation 0 0 0; relative location 0 0 0, rotation 0 0 0
  bounding box size 29.4484 7.86972 2.4164
  Design: ChordTrimFlag=0 ChordTrimMax=0.9 ChordTrimMin=0.1 Offset=0.15 UTrimFlag=1 UTrimMax=0.425 UTrimMin=0.2 V1TrimBegin=0.3 V1TrimEnd=1 V1TrimFlag=0 V2TrimBegin=0.43 V2TrimEnd=0.07 V2TrimFlag=1

Conformal "Aft Cargo Hold", child of "Fuselage"
  location (X Y Z) -32 0 -4.2, rotation 0 0 0; relative location 0 0 0, rotation 0 0 0
  bounding box size 9.90547 7.86613 5.64038
  Design: ChordTrimFlag=0 ChordTrimMax=0.9 ChordTrimMin=0.1 Offset=0.15 UTrimFlag=1 UTrimMax=0.7 UTrimMin=0.635 V1TrimBegin=0.3 V1TrimEnd=1 V1TrimFlag=0 V2TrimBegin=0.07 V2TrimEnd=0.43 V2TrimFlag=1

Custom "Passenger Seats", child of "Fuselage"
  location (X Y Z) -10 3.25 -3.75, rotation 180 0 0; relative location 22 3.25 0.45, rotation 180 0 0
  bounding box size 32.5359 8 3.50438
  Design: BackAngle=-7 BackHeight=3.5 BackThick=0.25 SeatHeight=0.25 SeatLength=1.5 Width=1.5
  Layout: AisleWidth=1.5 NumLeft=2 NumMiddle=0 NumRight=2 NumRow=12 SeatGap=0.166667 SeatPitch=2.75
  custom script SeatGroup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

Custom "Passenger", child of "Passenger Seats"
  location (X Y Z) -6.5 1.65 -0.833333, rotation 0 90 0; relative location 3.5 -1.6 2.91667, rotation 0 90 0
  bounding box size 2.28571 2.12571 4.88571
  Design: ElbowAngle=10 Height=6 HipAngle=90 KneeAngle=-90 PresetTrigger=0 Presets=1 ShoulderAngle=0
  custom script PodMan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

Stack "Main Gear Fairing", child of "Fuselage"
  location (X Y Z) 1.28261 0 -4.18357, rotation 180 0 0
  bounding box size 20.1776 8.84909 3.39815
  cross sections:
    n  XDelta  YDelta  ZDelta  shape
    0  0       0       0       edit curve Width=9 Height=8.75 AbsoluteFlag=0 SymType=1 cubic Bezier points (X Y): 0.258838 0.363904, 0.228206 0.395411, 0.240459 0.401712, 0.179195 0.448973, 0.120995 0.474178, 0.0444159 0.458425, 0 0.464726, -0.0444159 0.458425, -0.120995 0.474178, -0.179195 0.448973, -0.240459 0.401712, -0.228206 0.395411, -0.258838 0.363904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
    1  6       0       2.5     edit curve Width=6.70833 Height=5.32835 AbsoluteFlag=0 SymType=1 cubic Bezier points (X Y): 0.548541 0.128223, 0.552114 0.0202458, 0.566409 -0.0967299, 0.511644 -0.0853697, 0.355479 0.121587, 0.728988 0.464792, 0 0.44237, -0.728988 0.464792, -0.355479 0.121587, -0.511644 -0.0853697, -0.566409 -0.0967299, -0.552114 0.0202458, -0.548541 0.128223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
    2  4       0       0.1     as above
    3  4       0       -0.1    as above
    4  6       0       -2.5    edit curve Width=9 Height=8.75 AbsoluteFlag=0 SymType=1 cubic Bezier points (X Y): 0.258838 0.363904, 0.228206 0.395411, 0.240459 0.401712, 0.179195 0.448973, 0.120995 0.474178, 0.0444159 0.458425, 0 0.464726, -0.0444159 0.458425, -0.120995 0.474178, -0.179195 0.448973, -0.240459 0.401712, -0.228206 0.395411, -0.258838 0.363904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

VSPAERO settings: Sref=826.135 bref=118.11 cref=5.41837 Xcg=0 Ycg=0 Zcg=0 AlphaStart=-10 AlphaEnd=10 AlphaNpts=21 BetaStart=0 BetaEnd=0 BetaNpts=1 MachStart=0.6 MachEnd=0 MachNpts=1 ReCref=9.2586e+06 Vinf=100 Rho=0.002377
