OpenVSP model (file version 5), 9 components.
Geometry view with OpenVSP parameter names; values to 6 digits, angles in degrees, lengths in the model's unit.
Overall bounding box: X_Min=-32.405 X_Len=85.7514 Y_Min=-57.8893 Y_Len=115.779 Z_Min=-7.05468 Z_Len=18.8545

Wing "Main Wing"
  location (X Y Z) 6.32911e-05 0 0.000177215, rotation 0 0 0
  symmetric about XZ
  bounding box size 13.9158 115.779 2.36187
  totals: TotalSpan=118.11 TotalProjectedSpan=115.779 TotalChord=5.27 TotalArea=826.579 TotalAR=16.2171
  root: chord 11.6185, twist 0, NACA 4-series Camber=0 CamberLoc=0.2 ThickChord=0.1
  sections:
    n  Span      Root_Chord  Tip_Chord  Area      Sweep  Sweep_Location  Dihedral  Twist  Twist_Location  tip airfoil
    1  11.4223   11.6185     9.6821     121.651   10     0               0         0      0.25            as above
    2  45.6891   9.6821      2.94139    288.378   10     0               0         0      0.25            as above
    3  0.215971  2.94139     2.15702    0.550555  75     0               30        0      0.25            as above
    4  1.72777   2.15702     0.980465   2.71043   50     0               70        0      0.25            as above

Custom "Fuselage"
  location (X Y Z) -32.405 0 -2.734, rotation 0 0 0
  bounding box size 80 8.10127 8.37131
  Design: AftCenter=0.25 AftHeight=0.3 AftMult=3 AftWidth=0.1 Diameter=8.10127 Length=80 NoseCenter=-0.2 NoseMult=1.5
  custom script TransportFuse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

Wing "Horizontal Stabilizer"
  location (X Y Z) 46.5823 0 10.4306, rotation 0 0 0
  symmetric about XZ
  bounding box size 6.76404 21.0378 0.506623
  totals: TotalSpan=20.2532 TotalProjectedSpan=20.2532 TotalChord=4.55696 TotalArea=92.2929 TotalAR=4.44444
  root: chord 5.06329, twist 0, NACA 4-series Camber=0 CamberLoc=0.2 ThickChord=0.1
  sections:
    n  Span     Root_Chord  Tip_Chord  Area     Sweep  Sweep_Location  Dihedral  Twist  Twist_Location  tip airfoil
    1  10.1266  5.06329     4.05063    46.1465  15     0               0         0      0.25            as above

Wing "Vertical Stabilizer"
  location (X Y Z) 35.8482 0 -1.72134, rotation 90 0 0
  bounding box size 15.7018 1.05378 13.5212
  totals: TotalSpan=13.1646 TotalProjectedSpan=13.1646 TotalChord=9.31646 TotalArea=122.647 TotalAR=1.41304
  root: chord 10.5316, twist 0, NACA 4-series Camber=0 CamberLoc=0.2 ThickChord=0.1
  sections:
    n  Span     Root_Chord  Tip_Chord  Area     Sweep  Sweep_Location  Dihedral  Twist  Twist_Location  tip airfoil
    1  13.1646  10.5316     8.10127    122.647  30     0               0         0      0.25            as above

Wing "Truss Brace"
  location (X Y Z) 11.3588 0 -6.78463, rotation 0 0 0
  symmetric about XZ
  bounding box size 9.64253 50.979 6.94224
  totals: TotalSpan=52.6582 TotalProjectedSpan=50.979 TotalChord=3.25 TotalArea=171.139 TotalAR=15.1856
  root: chord 5, twist 0, NACA 4-series Camber=0 CamberLoc=0.2 ThickChord=0.1
  sections:
    n  Span     Root_Chord  Tip_Chord  Area     Sweep  Sweep_Location  Dihedral  Twist  Twist_Location  tip airfoil
    1  13.1646  5           3          52.6582  -10    0               14        0      0.25            as above
    2  13.1646  3           2          32.9114  -10    0               15        0      0.25            as above

Fuselage "Turboprop Housing"
  location (X Y Z) 0 -11.139 0, rotation 0 0 0
  symmetric about XZ
  bounding box size 20.5455 25.1029 4.89576
  Design: Length=20.5455
  cross sections:
    n  XLocPercent  YLocPercent  ZLocPercent  shape
    0  0            0            0            circle Circle_Diameter=2
    1  0.25         0            -0.0340708   ellipse Ellipse_Height=4.77838 Ellipse_Width=2.5
    2  0.75         0            -0.0340708   as above
    3  1            0            0.0375709    point

Propeller "Propeller", child of "Turboprop Housing"
  location (X Y Z) -1.32842 -11.139 0, rotation 0 0 0; relative location -1.32842 0 0, rotation 0 0 0
  symmetric about XZ
  bounding box size 1.27495 34.0019 11.4256
  Design: Diameter=12 NumBlade=6 Beta34=20 UseBeta34Flag=1 Feather=0 Rotate=0 Precone=0 ReverseFlag=0 FoldAngle=0 PropMode=0 AF=121.552 CLi=0.539797 Chord=0.225791 Solidity=0.431229 ConstructXoC=0.517094 FeatherAxisXoC=0 FeatherOffsetXoC=-0.25641
  cross sections:
    n  RadiusFrac  shape
    0  0.15        ellipse Ellipse_Height=0.565278 Ellipse_Width=1.13056
    1  0.4         NACA 16-series Chord=1.84394 IdealCl=0.7 ThickChord=0.144074
    2  1           NACA 16-series Chord=6e-08 IdealCl=0.2 ThickChord=0.03
  Chord along r/R (cubic Bezier): 0.15: 0.188426, 0.310249: 0.351389, 0.470499: 0.319444, 0.630748: 0.25463, 0.699815: 0.218981, 0.768883: 0.198611, 0.83795: 0.15787, 0.891967: 0.127315, 0.945983: 0.0865741, 1: 1e-08
  Twist along r/R (PCHIP): 0.15: 60, 0.75: 20, 1: 13
  Sweep along r/R (cubic Bezier): 0.15: 0, 0.433333: 0, 0.716667: -2.16944, 1: 12.2222
  Thick along r/R (cubic Bezier): 0.15: 0.5, 0.2: 0.3, 0.25: 0.225, 0.3: 0.2, 0.4: 0.125, 0.5: 0.115, 0.6: 0.1, 0.733333: 0.075, 0.866667: 0.055, 1: 0.03
  CLI along r/R (cubic Bezier): 0.15: 0, 0.233333: 0.7, 0.316667: 0.7, 0.4: 0.7, 0.466667: 0.7, 0.533333: 0.7, 0.6: 0.7, 0.733333: 0.7, 0.866667: 0.7, 1: 0.2

Fuselage "Propeller Cone", child of "Turboprop Housing"
  location (X Y Z) -2.59851 -11.139 0, rotation 0 0 0; relative location -2.59851 0 0, rotation 0 0 0
  symmetric about XZ
  bounding box size 5.09091 24.278 2
  Design: Length=5.09091
  cross sections:
    n  XLocPercent  YLocPercent  ZLocPercent  shape
    0  0            0            0            point
    1  0.5          0            0            circle Circle_Diameter=2
    2  1            0            0            ellipse Ellipse_Height=2 Ellipse_Width=2

Fuselage "Inlet", child of "Turboprop Housing"
  location (X Y Z) 0.326087 -11.139 -2.3, rotation 0 0 0; relative location 0.326087 0 -2.3, rotation 0 0 0
  symmetric about XZ
  bounding box size 11.7762 25.0332 1.5
  Design: Length=10
  cross sections:
    n  XLocPercent  YLocPercent  ZLocPercent  shape
    0  1            0            0.027027     ellipse Ellipse_Height=0.322581 Ellipse_Width=1
    1  0.5          0            0            rounded rectangle RoundRectXSec_Radius=0.2 RoundedRect_Height=1.5 RoundedRect_Width=2.5
    2  0.2          0            0            super ellipse Super_Height=1.5 Super_M=4 Super_MaxWidthLoc=0 Super_N=2 Super_Width=2.67027
    3  0            0            0            super ellipse Super_Height=1 Super_M=3 Super_MaxWidthLoc=0 Super_N=2 Super_Width=2.5
    4  0.0162162    0            0            super ellipse Super_Height=0.8 Super_M=3 Super_MaxWidthLoc=0 Super_N=2 Super_Width=2
    5  0.5          0            0            super ellipse Super_Height=1 Super_M=3 Super_MaxWidthLoc=0 Super_N=2 Super_Width=2
    6  1            0            0.027027     ellipse Ellipse_Height=0.322581 Ellipse_Width=1
