OpenVSP model (file version 5), 6 components.
Geometry view with OpenVSP parameter names; values to 6 digits, angles in degrees, lengths in the model's unit.
Overall bounding box: X_Min=0 X_Len=52.262 Y_Min=-57.9029 Y_Len=115.806 Z_Min=-8.5346 Z_Len=20.8125

Wing "Horizontal Stabilizer"
  location (X Y Z) 45.3174 0 10.8043, rotation 0 0 0
  symmetric about XZ
  bounding box size 6.37967 21.3765 0.689932
  totals: TotalSpan=20.4396 TotalProjectedSpan=20.4396 TotalChord=4.59891 TotalArea=94 TotalAR=4.44444
  root: chord 5.74864, twist 0, NACA 64-series A=1 IdealCl=0 ThickChord=0.12
  sections:
    n  Span     Root_Chord  Tip_Chord  Area  Sweep  Sweep_Location  Dihedral  Twist  Twist_Location  tip airfoil
    1  10.2198  5.74864     3.44918    47    16     0               0         0      0.25            NACA 63-series A=1 IdealCl=0 ThickChord=0.14

Wing "Vertical Stabilizer"
  location (X Y Z) 32.1 0 -1, rotation 90 0 0
  bounding box size 20.162 1.92027 13.2779
  totals: TotalSpan=12.75 TotalProjectedSpan=12.75 TotalChord=11.125 TotalArea=144.188 TotalAR=1.12744
  root: chord 16, twist 0, NACA 64-series A=1 IdealCl=0 ThickChord=0.12
  sections:
    n  Span  Root_Chord  Tip_Chord  Area     Sweep  Sweep_Location  Dihedral  Twist  Twist_Location  tip airfoil
    1  7     16          10         91       50     0               0         0      0.25            NACA 64-series A=1 IdealCl=0 ThickChord=0.14
    2  5.75  10          8.5        53.1875  30     0               0         0      0.25            as above

Wing "Main Wing"
  location (X Y Z) 6.32911e-05 0 0.000177215, rotation 0 0 0
  symmetric about XZ
  bounding box size 10.3011 115.806 2.50315
  totals: TotalSpan=118.11 TotalProjectedSpan=115.779 TotalChord=5.41837 TotalArea=826.135 TotalAR=16.2258
  root: chord 10.188, twist 2, airfoil file "NACA 64-210"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 BaseThickChord=0.100034 ThickChord=0.16
  sections:
    n  Span      Root_Chord  Tip_Chord  Area      Sweep  Sweep_Location  Dihedral  Twist  Twist_Location  tip airfoil
    1  11.4223   10.188      9.30258    111.314   5      0               0         0      0.25            airfoil file "NACA 64-210"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 BaseThickChord=0.100034 ThickChord=0.13
    2  45.6891   9.30258     3.72103    297.519   5      0               0         -2     0.25            airfoil file "NACA 64-210"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 BaseThickChord=0.100034 ThickChord=0.12
    3  0.215971  3.72103     3.05641    0.731865  75     0               30        0      0.25            airfoil file "NACA 64-210"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 BaseThickChord=0.100034 ThickChord=0.11
    4  1.72777   3.05641     0.9989     3.50332   50     0               70        0      0.25            airfoil file "NACA 64-210"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 BaseThickChord=0.100034 ThickChord=0.1

Wing "Truss Brace", child of "Main Wing"
  location (X Y Z) 8.25006 0 -8.28446, rotation 0 0 0; relative location 8.25 0 -8.28463, rotation 0 0 0
  symmetric about XZ
  bounding box size 7.93087 64.8634 8.73761
  totals: TotalSpan=67 TotalProjectedSpan=64.8634 TotalChord=3.25 TotalArea=217.75 TotalAR=19.3215
  root: chord 5, twist 0, NACA 4-series Camber=0 CamberLoc=0.2 ThickChord=0.1
  sections:
    n  Span   Root_Chord  Tip_Chord  Area    Sweep  Sweep_Location  Dihedral  Twist  Twist_Location  tip airfoil
    1  16.75  5           3          67      -5     0               14        0      0.25            as above
    2  16.75  3           2          41.875  -5     0               15        0      0.25            as above

Propeller "PropGeom", child of "Main Wing"
  location (X Y Z) 0 8.83929 0, rotation 0 0 0
  symmetric about XZ
  bounding box size 0 22.6786 5
  Design: Diameter=5 NumBlade=5 Beta34=20 UseBeta34Flag=1 Feather=0 Rotate=0 Precone=0 ReverseFlag=0 FoldAngle=0 PropMode=2 AF=151.538 CLi=0.538798 Chord=0.177656 Solidity=0.282749 ConstructXoC=0.5 FeatherAxisXoC=0.5 FeatherOffsetXoC=0
  cross sections:
    n  RadiusFrac  shape
    0  0.2         ellipse Ellipse_Height=0.1 Ellipse_Width=0.2
    1  0.4         NACA 16-series Chord=0.415625 IdealCl=0.7 ThickChord=0.144074
    2  1           NACA 16-series Chord=0.325 IdealCl=0.2 ThickChord=0.03
  Chord along r/R (cubic Bezier): 0.2: 0.08, 0.333333: 0.15, 0.466667: 0.2, 0.6: 0.2, 0.716667: 0.2, 0.833333: 0.2, 0.95: 0.2, 0.966667: 0.2, 0.983333: 0.2, 1: 0.13
  Twist along r/R (PCHIP): 0.2: 46.75, 0.75: 20, 1: 13
  Thick along r/R (cubic Bezier): 0.2: 0.5, 0.233333: 0.3, 0.266667: 0.225, 0.3: 0.2, 0.4: 0.125, 0.5: 0.115, 0.6: 0.1, 0.733333: 0.075, 0.866667: 0.055, 1: 0.03
  CLI along r/R (cubic Bezier): 0.2: 0, 0.266667: 0.7, 0.333333: 0.7, 0.4: 0.7, 0.466667: 0.7, 0.533333: 0.7, 0.6: 0.7, 0.733333: 0.7, 0.866667: 0.7, 1: 0.2

Propeller "PropGeom", child of "PropGeom"
  location (X Y Z) 0.285714 14.9286 0, rotation 0 0 0
  symmetric about XZ
  bounding box size 0 34.8571 5
  Design: Diameter=5 NumBlade=5 Beta34=20 UseBeta34Flag=1 Feather=0 Rotate=0 Precone=0 ReverseFlag=0 FoldAngle=0 PropMode=2 AF=151.538 CLi=0.538798 Chord=0.177656 Solidity=0.282749 ConstructXoC=0.5 FeatherAxisXoC=0.5 FeatherOffsetXoC=0
  cross sections:
    n  RadiusFrac  shape
    0  0.2         ellipse Ellipse_Height=0.1 Ellipse_Width=0.2
    1  0.4         NACA 16-series Chord=0.415625 IdealCl=0.7 ThickChord=0.144074
    2  1           NACA 16-series Chord=0.325 IdealCl=0.2 ThickChord=0.03
  blade curves as in "PropGeom"

VSPAERO settings: Sref=826.135 bref=118.11 cref=5.41837 Xcg=0 Ycg=0 Zcg=0 AlphaStart=-10 AlphaEnd=10 AlphaNpts=21 BetaStart=0 BetaEnd=0 BetaNpts=1 MachStart=0.6 MachEnd=0 MachNpts=1 ReCref=9.2586e+06 Vinf=100 Rho=0.002377
