OpenVSP model (file version 5), 12 components.
Geometry view with OpenVSP parameter names; values to 6 digits, angles in degrees, lengths in the model's unit.
Overall bounding box: X_Min=-32 X_Len=82.162 Y_Min=-57.9029 Y_Len=115.806 Z_Min=-9.56264 Z_Len=21.6893

Fuselage "Turboprop"
  location (X Y Z) -3.04348 11.422 -1.17391, rotation 0 0 0
  symmetric about XZ
  bounding box size 20.5455 25.6689 4.89576
  Design: Length=20.5455
  cross sections:
    n  XLocPercent  YLocPercent  ZLocPercent  shape
    0  0            0            0            circle Circle_Diameter=2
    1  0.25         0            -0.0340708   general fuselage BotStr=0.83 BotTanAngle=90 CornerRad=0 Height=4.77838 LowStr=0.83 MaxWidthLoc=0 TopStr=1.83 TopTanAngle=90 UpStr=0.83 Width=2.5
    2  0.75         0            -0.0340708   as above
    3  1            0            0.0375709    point

Fuselage "Propeller Cone", child of "Turboprop"
  location (X Y Z) -5.75009 11.422 -1.17391, rotation 0 0 0; relative location -2.70661 0 0, rotation 0 0 0
  symmetric about XZ
  bounding box size 5.09091 24.744 1.9
  Design: Length=5.09091
  cross sections:
    n  XLocPercent  XRotate   YLocPercent  ZLocPercent  shape
    0  0            0         0            0            point
    1  0.347826     0         0            0            circle Circle_Diameter=1.9
    2  1            -6.54545  0            0            circle Circle_Diameter=0.872962

Propeller "Propeller", child of "Propeller Cone"
  location (X Y Z) -4.31065 11.422 -1.17391, rotation 0 0 0; relative location 1.43944 0 0, rotation 0 0 0
  symmetric about XZ
  bounding box size 1.25901 34.711 11.627
  Design: Diameter=12 NumBlade=6 Beta34=20 UseBeta34Flag=1 Feather=0 Rotate=0 Precone=0 ReverseFlag=0 FoldAngle=0 PropMode=0 AF=161.554 CLi=0.539845 Chord=0.251407 Solidity=0.480153 ConstructXoC=0.5 FeatherAxisXoC=0 FeatherOffsetXoC=-0.25
  cross sections:
    n  RadiusFrac  shape
    0  0.12        ellipse Ellipse_Height=0.565278 Ellipse_Width=1.13056
    1  0.4         NACA 16-series Chord=1.83413 IdealCl=0.7 ThickChord=0.144074
    2  1           NACA 16-series Chord=0.672222 IdealCl=0.2 ThickChord=0.03
  Chord along r/R (cubic Bezier): 0.12: 0.188426, 0.296343: 0.351389, 0.472687: 0.305556, 0.64903: 0.280093, 0.76602: 0.244444, 0.88301: 0.188426, 1: 0.112037
  Twist along r/R (PCHIP): 0.12: 60, 0.75: 20, 1: 13
  Sweep along r/R (cubic Bezier): 0.12: 0, 0.413333: 0, 0.706667: -2.16944, 1: 12.2222
  Thick along r/R (cubic Bezier): 0.12: 0.5, 0.18: 0.3, 0.24: 0.225, 0.3: 0.2, 0.4: 0.125, 0.5: 0.115, 0.6: 0.1, 0.733333: 0.075, 0.866667: 0.055, 1: 0.03
  CLI along r/R (cubic Bezier): 0.12: 0, 0.213333: 0.7, 0.306667: 0.7, 0.4: 0.7, 0.466667: 0.7, 0.533333: 0.7, 0.6: 0.7, 0.733333: 0.7, 0.866667: 0.7, 1: 0.2

Fuselage "Inlet", child of "Turboprop"
  location (X Y Z) -2.71739 11.422 -3.47391, rotation 0 0 0; relative location 0.326087 0 -2.3, rotation 0 0 0
  symmetric about XZ
  bounding box size 10.103 25.96 1.61603
  Design: Length=10
  cross sections:
    n  XLocPercent  YLocPercent  ZLocPercent  shape
    0  1            0            0.027027     ellipse Ellipse_Height=1 Ellipse_Width=1
    1  0.99         0            0.027027     ellipse Ellipse_Height=0.8 Ellipse_Width=0.8
    2  0.5          0            0            super ellipse Super_Height=1.5 Super_M=2 Super_MaxWidthLoc=0 Super_N=2 Super_Width=2
    3  0.01622      0            0            super ellipse Super_Height=1 Super_M=4 Super_MaxWidthLoc=0 Super_N=2 Super_Width=2.3
    4  0            0            0            super ellipse Super_Height=1.2 Super_M=4 Super_MaxWidthLoc=0 Super_N=2 Super_Width=2.7
    5  0.2          0            0            super ellipse Super_Height=1.6 Super_M=5 Super_MaxWidthLoc=0 Super_N=2 Super_Width=2.8
    6  0.5          0            0            rounded rectangle RoundRectXSec_Radius=0.2 RoundedRect_Height=1.5 RoundedRect_Width=2.5
    7  0.99         0            0.025        super ellipse Super_Height=1.1 Super_M=2 Super_MaxWidthLoc=0 Super_N=3 Super_Width=1.1
    8  1            0            0.027027     ellipse Ellipse_Height=1 Ellipse_Width=1

Custom "Inlet", child of "Inlet"
  location (X Y Z) -2.2412 11.422 -3.47391, rotation 0 0 0; relative location 0.47619 0 0, rotation 0 0 0
  symmetric about XZ
  bounding box size 0.001 25.1689 1.1
  Design: Height=1.1 Length=0.001 SquareFlag=0 Width=2.32493
  custom script Box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

Custom "Inlet", child of "Inlet"
  location (X Y Z) -2.41739 11.422 -3.47391, rotation 0 0 0; relative location 0.3 0 0, rotation 0 0 0
  symmetric about XZ
  bounding box size 0.001 25.1689 1.1
  Design: Height=1.1 Length=0.001 SquareFlag=0 Width=2.32493
  custom script Box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

Stack "Gearbox", child of "Turboprop"
  location (X Y Z) -2.06522 11.422 -1.52174, rotation 0 0 0
  symmetric about XZ
  bounding box size 3.5079 24.2079 2.14335
  cross sections:
    n  XDelta     YDelta  ZDelta  shape
    0  0          0       0       point
    1  0.262295   0       0       ellipse Ellipse_Height=2.11231 Ellipse_Width=1.16508
    2  1.39344    0       0       ellipse Ellipse_Height=2.01573 Ellipse_Width=1.36395
    3  1.39344    0       0       ellipse Ellipse_Height=2.14335 Ellipse_Width=1.2896
    4  0.0819672  0       0       point

Stack "Compressor", child of "Turboprop"
  location (X Y Z) 4.7 11.422 -2.4, rotation 0 0 0
  symmetric about XZ
  bounding box size 3.55089 25.094 3.2
  cross sections:
    n  XDelta    YDelta  ZDelta  shape
    0  0         0       0       point
    1  0.42623   0       0       ellipse Ellipse_Height=3.2 Ellipse_Width=2.25
    2  2.57377   0       0       ellipse Ellipse_Height=2.5 Ellipse_Width=1.5
    3  0.254098  0       0       point

Stack "Turbine", child of "Compressor"
  location (X Y Z) 9 11.422 -2.4, rotation 0 0 0
  symmetric about XZ
  bounding box size 3.54189 25.094 3.2
  cross sections:
    n  XDelta    YDelta  ZDelta  shape
    0  0         0       0       point
    1  0.262295  0       0       ellipse Ellipse_Height=2.5 Ellipse_Width=1.5
    2  2.55738   0       0       ellipse Ellipse_Height=3.2 Ellipse_Width=2.25
    3  0.5       0       0       point

Stack "Power Shaft", child of "Turbine"
  location (X Y Z) 0.76087 11.422 -2.28261, rotation 0 0 0
  symmetric about XZ
  bounding box size 10.5 27.0563 4.21231
  cross sections:
    n  XDelta  YDelta  ZDelta  shape
    0  0       0       0       circle Circle_Diameter=0.5
    1  10.5    0       0       as above

Stack "Electric Motor", child of "Turboprop"
  location (X Y Z) 2 11.422 -1, rotation 0 0 0
  symmetric about XZ
  bounding box size 2.1514 24.117 1.27297
  cross sections:
    n  XDelta      YDelta  ZDelta  shape
    0  0           0       0       point
    1  0.0983607   0       0       circle Circle_Diameter=1.27297
    2  1.7377      0       0       circle Circle_Diameter=1.194
    3  0.00819672  0       0       point

Stack "Electric Motor Power Shaft", child of "Electric Motor"
  location (X Y Z) 0 11.42 -1, rotation 0 0 0
  symmetric about XZ
  bounding box size 2.07377 23.5487 0.708654
  cross sections:
    n  XDelta    YDelta  ZDelta  shape
    0  0         0       0       circle Circle_Diameter=0.5
    1  0.590164  0       0       as above
    2  1.07377   0       0       circle Circle_Diameter=0.49505
    3  0.409836  0       0       circle Circle_Diameter=0.5

VSPAERO settings: Sref=826.135 bref=118.11 cref=5.41837 Xcg=0 Ycg=0 Zcg=0 AlphaStart=-10 AlphaEnd=10 AlphaNpts=21 BetaStart=0 BetaEnd=0 BetaNpts=1 MachStart=0.6 MachEnd=0 MachNpts=1 ReCref=9.2586e+06 Vinf=100 Rho=0.002377
